n := 7
M := [n, n + 1, n + 2; n - 3, n - 2, n; n - 1, n, n + 1]
M = [7, 8, 9; 4, 5, 7; 6, 7, 8]
N := [6*n + 8; 6*n - 7; 6*n + 2]
N := [50; 35; 44]
[x; y; z] := M^-1*N = [1; 2; 3]
X := [x; y; z] = [1; 2; 3]
