x := -2, -1.6 .. 2
x = [-2; -1.6; -1.2; -0.8; -0.4; 0; 0.4; 0.8; 1.2; 1.6; 2]
n := 3 = 3
f(x) := (x^2 - (n*x) + sin(x))*sqrt(|x - cos(n*x)|)
f(x) = [15.6407; 8.26243; 2.26215; 0.581154; 0.847445; 0; -0.126223; -1.29279; -1.77811; -1.52552; -1.11221]
