n := 7
a := -3*n = -21
b := 3*n = 21
A := runif(3, a, b) = [15.2132; 11.7456; 20.8654]
B := runif(3, a, b) = [-20.6252; 1.32989; 4.27409]
C := runif(3, a, b) = [19.1478; 1.65234; -1.5929]
s := A*B
w := (A×B)*C = -806.722
V := B×C = [-9.18066; 48.9855; -59.5445]
s = -208.975
dA := sqrt(A[0]^2 + A[1]^2 + A[2]^2)
dA = 28.3684
dB := sqrt(B[0]^2 + B[1]^2 + B[2]^2)
dB = 21.1054
dC := sqrt(C[0]^2 + C[1]^2 + C[2]^2)
dC = 19.2849
D := [dA; dB; dC]
maxVal := max(D) = 28.3684
