i := 1 .. 16
x[1] := -2*π
Δx := π/4
x[i] := x[1] + i*Δx
g(x) := sqrt(|x|)*sin(x)
x = [0; -5.49779; -3.92699; -3.14159; -2.35619; -1.5708; -0.785398; 0; 0.785398; 1.5708; 2.35619; 3.14159; 3.92699; 4.71239; 5.49779; 6.28319; 7.06858]
g(x) = [0; 2.78303; 2.78303; 0; -2.78303; -3.93579; -2.78303; 0; 2.78303; 3.93579; 2.78303; 0; -2.78303; -3.93579; -2.78303; 0; 2.78303]
Y := g(x)
file1 := "X.txt"
file2 := "Y.txt"
WRITEPRN(file1) := x
WRITEPRN(file2) := Y
XX := READPRN(file1)
YY := READPRN(file2)
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XX = [0; -5.498; -3.927; -3.142; -2.356; -1.571; -0.7854; 0; 0.7854; 1.571; 2.356; 3.142; 3.927; 4.712; 5.498; 6.283; 7.069]
YY = [0; 2.783; 2.783; 0; -2.783; -3.936; -2.783; 0; 2.783; 3.936; 2.783; 0; -2.783; -3.936; -2.783; 0; 2.783]
