f(x, y) := sin(sqrt(x^2 + y^2))/sqrt(x^2 + y^2)
x[1] := -15
x[2] := 15
Δx := 1
XX := 43
y[1] := -15
y[2] := 15
Δy := 1
YY := 43
i := 0 .. XX - 1
x[i] := x[1] + i*Δx
j := 0 .. YY - 1
y[j] := y[1] + j*Δy
M[i, j] := f(x[i], y[j])
# [component: inputs M]
