i := 1 .. 40
x[1] := -2*π
Δx := π/10
x[i] := x[1] + i*Δx
y(x) := sin(x)
g(x) := cos(x - π/4)
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g(x) = [
    0.707107; 0.891007; 0.987688; 0.891007; 0.707107; 0.45399; 0.156434; -0.156434; -0.45399; -0.707107
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]
X := g(x)
fileSv := "G.txt"
WRITEPRN(fileSv) := X
root(g(x), x, -2*π, -π) = -3.92699
