Xa := -2
Xb := -3
Xc := 0
Xd := 3
Xe := 2
Xf := -2
Xg := 2
Ya := -4
Yb := 0
Yc := 4
Yd := 0
Ye := -4
Yf := 0
Yg := 0
Xlw := 100
Ylw := 200
Xhw := 400
Yhw := 500
Zx := [Xa, Xb, Xc, Xd, Xe, Xf, Xg]
Zy := [Ya, Yb, Yc, Yd, Ye, Yf, Yg]
Xl := min(Zx) = -3
Yh := max(Zy) = 4  # Левый угол в МСК
Xh := max(Zx) = 3
Yl := min(Zy) = -4  # Правый угол в МСК
# Параметры, используемые для создания матрицы пересчета координат из МСК в ОСК
ΔXw := Xhw - Xlw = 300  # Ширина области отображения в оконных координатах
ΔX := Xh - Xl = 6  # Ширина области отображения в мировых координатах
ΔYw := Yhw - Ylw = 300  # Высота области отображения в оконных координатах
ΔY := Yh - Yl = 8  # Высота области отображения в мировых координатах
Kx := ΔXw/ΔX = 50  # Коэффициент kx
Ky := ΔYw/ΔY = 37.5  # Коэффициент ky
Tsw := [Kx, 0, Xlw - Kx*Xl; 0, -Ky, Yhw + Ky*Yl; 0, 0, 1]  # Матрица пересчета из МСК в ОСК
# Определение векторов вершин фигуры в МСК
Va := [Xa; Ya; 1]
Vb := [Xb; Yb; 1]
Vc := [Xc; Yc; 1]
Vd := [Xd; Yd; 1]
Ve := [Xe; Ye; 1]
Vf := [Xf; Yf; 1]
Vg := [Xg; Yg; 1]
# Определение координат вершин в ОСК
[Xaw; Yaw; q] := Tsw*Va = [150; 500; 1]
[Xbw; Ybw; q] := Tsw*Vb = [100; 350; 1]
[Xcw; Ycw; q] := Tsw*Vc = [250; 200; 1]
[Xdw; Ydw; q] := Tsw*Vd = [400; 350; 1]
[Xew; Yew; q] := Tsw*Ve = [350; 500; 1]
[Xfw; Yfw; q] := Tsw*Vf = [150; 350; 1]
[Xgw; Ygw; q] := Tsw*Vg = [350; 350; 1]
X := transpose([Xb, Xc, Xd, Xb, Xf, Xa, Xe, Xg, Xd])
Y := transpose([Yb, Yc, Yd, Yb, Yf, Ya, Ye, Yg, Yd])
Xw := transpose([Xbw, Xcw, Xdw, Xbw, Xfw, Xaw, Xew, Xgw, Xdw])
Yw := -transpose([Ybw, Ycw, Ydw, Ybw, Yfw, Yaw, Yew, Ygw, Ydw])
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