f(x) := sin(π*x)*sqrt(|x|)
x1 := -6
x2 := 6
Δx := 0.1
Xlw := 100
Xhw := 800
Ylw := 200
Yhw := 900
# Находим число точек графика:
N := ((x2 - x1)/Δx) = 120
# Заполняем массивы X, Y, Z в МСК:
i := 0 .. N
X[i] := x1 + i*Δx
Y[i] := f(X[i])
Z[i] := 1
# Находим область графика в МСК:
Xl := min(X) = -6
Yh := max(Y) = 2.34521  # Левый верхний угол
Xh := max(X) = 6
Yl := min(Y) = -2.34521  # Правый нижний угол
# Матрица координат точек МСК:
Ms := stack(transpose(X), transpose(Y), transpose(Z))
# Расчет параметров для матрицы перехода из МСК в ОСК:
ΔXw := Xhw - Xlw = 700
ΔX := Xh - Xl = 12
ΔYw := Yhw - Ylw = 700
ΔY := Yh - Yl = 4.69042
Kx := ΔXw/ΔX = 58.3333
Ky := ΔYw/ΔY = 149.241
# Итоговая матрица перехода:
Tsw := [Kx, 0, Xlw - Kx*Xl; 0, -Ky, Yhw + Ky*Yl; 0, 0, 1]
# Матрица координат точек в ОСК:
Mw := Tsw*Ms
# Берем только X и Y точек:
Xw := transpose(Mw)[:, 0]
Yw := transpose(Mw)[:, 1]
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