# Отрезок AB
Xab := [2; 5]
Yab := [12; 9]
# Отрезок CD
Xcd := [2; 5]
Ycd := [3; 6]
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# Исходное положение отрезков AB и CD
# Поиск точки пересечения отрезков AB и CD:
Given
Yab[0] == k1*Xab[0] + b1
Yab[1] == k1*Xab[1] + b1
Find(k1, b1) → [-1; 14]
k1 := -1
b1 := 14
y == k1*x + b1  # Уравнение отрезка AB
Given
Ycd[0] == k2*Xcd[0] + b2
Ycd[1] == k2*Xcd[1] + b2
Find(k2, b2) → [1; 1]
k2 := 1
b2 := 1
y == k2*x + b2  # Уравнение отрезка CD
Given
y == k1*x + b1
y == k2*x + b2
Find(x, y) → [13/2; 15/2]
Px := 13/2
Py := 15/2  # Точка пересечения P
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# Первоначальные данные:
M := [Xab[0], Xab[1], Xcd[0], Xcd[1]; Yab[0], Yab[1], Ycd[0], Ycd[1]; 1, 1, 1, 1] = [2, 5, 2, 5; 12, 9, 3, 6; 1, 1, 1, 1]
# Матрица перемещения СК
Ts(dx, dy) := [1, 0, -dx; 0, 1, -dy; 0, 0, 1]
# Матрица поворота СК
Rs(φ) := [cos(φ), sin(φ), 0; -sin(φ), cos(φ), 0; 0, 0, 1]
φ := -135
φrad := φ*π/180 = -2.35619
# Смещение СК в точку P:
P1 := Ts(Px, Py)*M = [-4.5, -1.5, -4.5, -1.5; 4.5, 1.5, -4.5, -1.5; 1, 1, 1, 1]
# Поворот СК на 135 градусов:
P2 := Rs(φrad)*P1 = [0, 0, 6.36396, 2.12132; -6.36396, -2.12132, 0, 0; 1, 1, 1, 1]
# Переход полученной СК в исходную позицию:
P3 := Ts(-Px, -Py)*P2 = [6.5, 6.5, 12.864, 8.62132; 1.13604, 5.37868, 7.5, 7.5; 1, 1, 1, 1]
# Повернутый отрезок AB:
Xab_n := [P3[0, 0]; P3[0, 1]]
Yab_n := [P3[1, 0]; P3[1, 1]]
# Повернутый отрезок CD:
Xcd_n := [P3[0, 2]; P3[0, 3]]
Ycd_n := [P3[1, 2]; P3[1, 3]]
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